# НОВОЖИЛОВ МТ7-82 | ДЗ УТС
# Условия варианта:
n_1 := 0.54
n_2 := 1
n_3 := 1
n_4 := 30
n_5 := -15
# Лианеризация
# После линеаризации у всех получается ДУ вида:
# n.1 y'' + n.2 y' +n.3 y = - n.5*u
# Решение неоднородного ДУ
# Далее решаем ДУ при u=1;
# Характеристическое уравнение: | n.1 λ^2+n.2 λ +n.3 = 0
# Корни характеристического уравнения:
λ_1 := round((-n_2 + sqrt(n_2^2 - 4*n_1*n_3))/(2*n_1), 2) = -0.93 + 1i
λ_2 := round((-n_2 - sqrt(n_2^2 - 4*n_1*n_3))/(2*n_1), 2) = -0.93 - 1i
# Решение однородного ДУ:
λ := λ_1
# Решение однородного ДУ | y_оо = e^(Re(λ)t ()С_1cos(Im(λ)t)+С_2sin(Im(λ)t)
# y_оо =
e^(Re(λ)*t)*(C_1*cos(Im(λ)*t) + C_2*sin(Im(λ)*t)) → e^(-0.93*t)*(C_1*cos(1.0*t) + C_2*sin(1.0*t))
# Частное решение неоднородного ДУ ищется в виде много члена и равно:
# y_чн =
-n_5 → 15
# Общее решение неоднородного ДУ: | y_он =y_оо +y_чн
# y_он =
e^(Re(λ)*t)*(C_1*cos(Im(λ)*t) + C_2*sin(Im(λ)*t)) - n_5 → e^(-0.93*t)*(C_1*cos(1.0*t) + C_2*sin(1.0*t)) + 15
y_он(t) := e^(Re(λ)*t)*(C_1*cos(Im(λ)*t) + C_2*sin(Im(λ)*t)) - n_5
# Далее из начальных условий: | y(0) = 0;  y'(0) = 0
# Находим С_1 и С_2:
t_0 := 0  # Полученная система уравнений после знака ->
(e^(Re(λ)*t_0)*(C_1*cos(Im(λ)*t_0) + C_2*sin(Im(λ)*t_0)) - n_5) → C_1 + 15
d/dt_0(e^(Re(λ)*t_0)*(C_1*cos(Im(λ)*t_0) + C_2*sin(Im(λ)*t_0)) - n_5) → -0.93*C_1 + 1.0*C_2
Given
e^(Re(λ)*t_0)*(C_1*cos(Im(λ)*t_0) + C_2*sin(Im(λ)*t_0)) - n_5 == 0
d/dt_0(e^(Re(λ)*t_0)*(C_1*cos(Im(λ)*t_0) + C_2*sin(Im(λ)*t_0)) - n_5) == 0
# Присвоить значения согласно Find
Find(C_1, C_2) → [-15.0; -13.95]
C_1 := -15
C_2 := -13.95
# Тогда решение:
# y_он =
(e^(Re(λ)*t)*(C_1*cos(Im(λ)*t) + C_2*sin(Im(λ)*t)) - n_5) → e^(-0.93*t)*(-13.95*sin(1.0*t) - 15*cos(1.0*t)) + 15
# Далее строим график (y_чн(t))
y(t) := e^(Re(λ)*t)*(C_1*cos(Im(λ)*t) + C_2*sin(Im(λ)*t)) - n_5
# Управляющее воздействие:
u(t) := 1
y0(t) := -n_5
# Установившиеся значение:
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# Описание в пространстве состояний:
# Общий вид описания:
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# Матрица состояния системы (матрица А):
A_matr := [0, 1; -n_3/n_1, -n_2/n_1] = [0, 1; -1.85185, -1.85185]
# Матрица управления (матрица B):
B_matr := [0; -n_5/n_1] = [0; 27.7778]
# Матрица наблюдения имеет вид:
C_matr := [1; 0]
# Решая систему получим:
# Для x_1(t) (точно то же что для y_он(t)):
x_1(t) := y(t)
# Для x_2(t) производная от этой функции:
x_2(t) := d/dt(y(t))
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# Переходная матрица
# Найдем переходную матрицу:
# Характеристические числа:
λ_1 = -0.93 + 1i
λ_2 = -0.93 - 1i
# Далее решаем систему уравнений:
e^(λ_1*t) = α_0 + α_1*λ_1
e^(λ_2*t) = α_0 + α_1*λ_2
# Решая систему в общем виде получим:
α_1(t) := (e^(λ_2*t) - e^(λ_1*t))/(λ_2 - λ_1)
α_0(t) := (e^(λ_2*t) + e^(λ_1*t))/2 - (e^(λ_2*t) - e^(λ_1*t))/2*(λ_2^2 - λ_1^2)
# Если корни комплексные. придется немного повозиться:
e^(λ_2*t) - e^(λ_1*t) = -(e^(Re(λ)*t)*(e^(Im(λ)*t) - e^(-Im(λ)*t)))
# Или :
e^(λ_2*t) - e^(λ_1*t) = -(e^(Re(λ)*t)*2*i*sin(Im(λ)*t))
e^(λ_2*t) + e^(λ_1*t) = e^(Re(λ)*t)*2*сos(Im(λ)*t)
# Необходимы коэффициенты:
# α_1(t) =
-e^(Re(λ)*t)*sin(Im(λ)*t)*2i*1/(λ_2 - λ_1) → 1.0*e^(-0.93*t)*sin(1.0*t)
# α_1(t) =
e^(Re(λ)*t)*(cos(Im(λ)*t) + sin(Im(λ)*t)*1i*(λ_2^2 - λ_1^2)) → e^(-0.93*t)*(cos(1.0*t) + (-3.72*sin(1.0*t)))
α_1(t) := -e^(Re(λ)*t)*sin(Im(λ)*t)*2i*1/(λ_2 - λ_1)
α_0(t) := e^(Re(λ)*t)*(cos(Im(λ)*t) + sin(Im(λ)*t)*1i*(λ_2^2 - λ_1^2))
A_matr → [0, 1; -1.85185185185, -1.85185185185]
I := [1, 0; 0, 1]
# Тогда матрица перехода: | A_перехода =e^At
# Или в матричной форме записи:
# Далее расчет такого вида
A_перехода(t) := (α_0(t)*I) + (α_1(t)*A_matr)
A_перехода(t) float, 2 → [
    e^(-0.93*t)*(cos(1.0*t) + (-3.7*sin(1.0*t))), 1.0*e^(-0.93*t)*sin(1.0*t);
    -1.9*e^(-0.93*t)*sin(1.0*t), -1.9*e^(-0.93*t)*sin(1.0*t) + e^(-0.93*t)*(cos(1.0*t) + (-3.7*sin(1.0*t)))
]
# ПОлученная матрица перехода:
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# Управляемость и наблюдаемость:
# Для определения управляемости необходимо чтобы ранг составной матрицы был максимальным. Для этого нужно чтобы её определитель ен был равен нулю.
# Составная матрица вида
U := (B*AB)
B_matr = [0; 27.7778]
A_matr*B_matr = [27.7778; -51.4403]
U_matr := augment(B_matr, A_matr*B_matr)
# Составная матрица:
U_matr = [0, 27.7778; 27.7778, -51.4403]
# Определитель:
|U_matr| = -771.605
# Т. к. определитель не равен нулю, матрица управляема
# Составная матрица вида
V := [C; СА]
C_matr := [1, 0]
C_matr*A_matr = [0, 1]
V_matr := stack(C_matr, C_matr*A_matr)
V_matr = [1, 0; 0, 1]
|V_matr| = 1
# Т. к. определитель не равен нулю, матрица наблюдаема
# Составить для ДУ предаточную функцию
# Тут просто преобразования Лапласа, описанные в ВОРД
# Итого: | Передаточая функция общий вид
W_1(p) := -n_5/n_3/(n_1/n_3*p^2 + n_2/n_3*p + 1)
# В моем случае:
T := 0.05
W_1(p) := 15/(0.54*p^2 + p + 1)
W_oc(p) := 1/(T*p + 1)
# Оценка управляемости замкнутой системы снеединичной отризательной обратной связью
# Передаточная функция системы с неединичной отризательной обратной связью:
W(p) := W_1(p)/(1 + W_1(p)*W_oc(p))
W(p) := -n_5/n_3/(n_1/n_3*p^2 + n_2/n_3*p + 1)/(((n_1/n_3*p^2 + n_2/n_3*p + 1)*(T*p + 1) + (-n_5/n_3))/((n_1/n_3*p^2 + n_2/n_3*p + 1)*(T*p + 1)))  # error: This value has units: Magnetic Flux Density^-1, but must have units: Magnetic Flux Density^-2.
# После преобразований:
# W(p) =
-n_5/n_3*(T*p + 1)/((n_1/n_3*p^2 + n_2/n_3*p + 1)*(T*p + 1) + (-n_5/n_3)) → (0.75*p + 15)/((0.05*p + 1)*(p + 0.54*p^2 + 1) + 15)
# Характеристическое уравнение имеет вид:
Given
(n_1/n_3*p^2 + n_2/n_3*p + 1)*(T*p + 1) + (-n_5/n_3) == 0
Find(p) → [-21.3311003169, -0.260375767499 + 5.26430338368i, -0.260375767499 - 5.26430338368i]
λ_3 := -0.26 - 5.26i
λ_1 := -21.33
λ_2 := -0.26 + 5.26i
# Переходная функция.
W(p) := -n_5/n_3*(T*p + 1)/((n_1/n_3*p^2 + n_2/n_3*p + 1)*(T*p + 1) + (-n_5/n_3))
(0.75*p + 15)/((0.05*p + 1)*(p + 0.54*p^2 + 1) + 15) simplify, float, 3 → (27.8*p + 556.0)/((p + 21.3)*(0.521*p + p^2 + 27.8))
