# ШАБЛОН ДЛЯ ЗАПОЛНЕНИЯ | ДЗ УТС
# Условия варианта:
n_1 := 0.6
n_2 := 1.6
n_3 := 1
n_4 := 12
n_5 := -10
# Лианеризация
# После линеаризации у всех получается ДУ вида:
# n.1 y'' + n.2 y' +n.3 y = - n.5*u
# Решение неоднородного ДУ
# Далее решаем ДУ при u=1;
# Характеристическое уравнение: | n.1 λ^2+n.2 λ +n.3 = 0
# Корни характеристического уравнения:
λ_1 := round((-n_2 + sqrt(n_2^2 - 4*n_1*n_3))/(2*n_1), 2) = -1
λ_2 := round((-n_2 - sqrt(n_2^2 - 4*n_1*n_3))/(2*n_1), 2) = -1.67
# Решение однородного ДУ:
# Если корни действительные: | y_оо = С_1e^λ1t +С_2e^λ2t
# y_оо =
(C_1*e^(λ_1*t) + C_2*e^(λ_2*t)) → C_1*e^(-t) + C_2*e^(-1.67*t)
# Частное решение неоднородного ДУ ищется в виде много члена и равно:
# y_чн =
-n_5 → 10
# Общее решение неоднородного ДУ: | y_он =y_оо +y_чн
# Если корни действительные:
# y_он =
(C_1*e^(λ_1*t) + C_2*e^(λ_2*t) - n_5) → C_1*e^(-t) + C_2*e^(-1.67*t) + 10
# Далее из начальных условий: | y(0) = 0;  y'(0) = 0
# Находим С_1 и С_2:
t_0 := 0  # Полученная система уравнений
(C_1*e^(λ_1*t_0) + C_2*e^(λ_2*t_0) - n_5) → C_1 + C_2 + 10
d/dt_0(C_1*e^(λ_1*t_0) + C_2*e^(λ_2*t_0) - n_5) → -1.67*C_2 - C_1
Given
(C_1*e^(λ_1*t_0) + C_2*e^(λ_2*t_0) - n_5) == 0
d/dt_0((C_1*e^(λ_1*t_0) + C_2*e^(λ_2*t_0) - n_5)) == 0  # ПЕРЕНЕСТИ В РУЧНУЮ ИЗ FIND(C1,C2)!!!!
C_1 := -24.93
Find(C_1, C_2) → [-24.9253731343; 14.9253731343]
C_2 := 14.93
# Тогда решение:
# y_он =
(C_1*e^(λ_1*t) + C_2*e^(λ_2*t) - n_5) → -24.93*e^(-t) + 14.93*e^(-1.67*t) + 10
# Далее строим график (y_чн(t)) | СЮДА ВСТАВИТЬ СВОЮ ФОРМУЛУ!!!:
# В моем случае общее решение
y(t) := C_1*e^(λ_1*t) + C_2*e^(λ_2*t) - n_5
# Управляющее воздействие:
u(t) := 1
# Установившиеся значение:
y0(t) := -n_5
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# Описание в пространстве состояний:
# Общий вид описания:
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# Матрица состояния системы (матрица А):
A_matr := [0, 1; -n_3/n_1, -n_2/n_1] = [0, 1; -1.66667, -2.66667]  # Все значения округляем до 2-x знаков
# Матрица управления (матрица B):
B_matr := [0; -n_5/n_1] = [0; 16.6667]
# Матрица наблюдения имеет вид:
C_matr := [1; 0]
# Решая систему получим:
# Для x_1(t) (точно то же что для y_он(t)):
x_1(t) := y(t)
# Для x_2(t) производная от этой функции:
x_2(t) := d/dt(y(t))
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# Переходная матрица
# Найдем переходную матрицу:
# Характеристические числа:
λ_1 = -1
λ_2 = -1.67
# Далее решаем систему уравнений:
e^(λ_1*t) = α_0 + α_1*λ_1
e^(λ_2*t) = α_0 + α_1*λ_2
# Решая систему в общем виде получим:
α_1(t) := (e^(λ_2*t) - e^(λ_1*t))/(λ_2 - λ_1)
α_0(t) := (e^(λ_2*t) + e^(λ_1*t))/2 - (e^(λ_2*t) - e^(λ_1*t))/2*(λ_2^2 - λ_1^2)
# Подставив получим:
# α_1(t) =
(e^(λ_2*t) - e^(λ_1*t))/(λ_2 - λ_1) → -1.49253731343*e^(-1.67*t) + 1.49253731343*e^(-t)
# α_0(t) =
e^(λ_1*t) - (e^(λ_2*t) - e^(λ_1*t))/(λ_2 - λ_1)*λ_1 → e^(-t) + (-1.49253731343*e^(-1.67*t)) + 1.49253731343*e^(-t)
I := [1, 0; 0, 1]
# Тогда матрица перехода:
# A_перехода =
e^At = α_0(t)*I + α_1(t)*A
# Или в матричной форме записи:
A_перехода(t) := α_0(t)*I + α_1(t)*A_matr
# Далее расчет такого вида
# ПОлученная матрица перехода:
A_перехода(t) → [
    e^(-1.67*t)/2 + e^(-t)/2 + (-0.89445*e^(-1.67*t)) + 0.89445*e^(-t), -1.49253731343*e^(-1.67*t) + 1.49253731343*e^(-t);
    2.48756218905*e^(-1.67*t) + (-2.48756218905*e^(-t)), e^(-1.67*t)/2 + e^(-t)/2 + (-0.89445*e^(-1.67*t)) + 0.89445*e^(-t) + 3.98009950249*e^(-1.67*t) + (-3.98009950249*e^(-t))
]
# Управляемость и наблюдаемость:
# Для определения управляемости необходимо чтобы ранг составной матрицы был максимальным. Для этого нужно чтобы её определитель ен был равен нулю.
# Составная матрица вида
U := (B*AB)
B_matr = [0; 16.6667]
A_matr*B_matr = [16.6667; -44.4444]
U_matr := augment(B_matr, A_matr*B_matr)
# Составная матрица:
U_matr = [0, 16.6667; 16.6667, -44.4444]
# Определитель:
|U_matr| = -277.778
# Т. к. определитель не равен нулю, система управляема
# Составная матрица вида
V := (C*AC)
C_matr = [1; 0]
A_matr*C_matr = [0; -1.66667]
V_matr := augment(C_matr, A_matr*C_matr)
V_matr = [1, 0; 0, -1.66667]
|V_matr| = -1.66667
# Т. к. определитель не равен нулю, система наблюдаема
# Составить для ДУ предаточную функцию
# Тут просто преобразования Лапласа, описанные в ВОРД
# Итого: | Передаточая функция общий вид
W_1(p) := -n_5/n_3/(n_1/n_3*p^2 + n_2/n_3*p + 1)
W_1(p) → 10/(1.6*p + 0.6*p^2 + 1)
# В моем случае:
W_oc(p) := 1/(T*p + 1)
# Оценка управляемости замкнутой системы снеединичной отризательной обратной связью
# Передаточная функция системы с неединичной отризательной обратной связью:
T := 0.05
W(p) := W_1(p)/(1 + W_1(p)*W_oc(p))
W(p) := -n_5/n_3/(n_1/n_3*p^2 + n_2/n_3*p + 1)/(((n_1/n_3*p^2 + n_2/n_3*p + 1)*(T*p + 1) + (-n_5/n_3))/((n_1/n_3*p^2 + n_2/n_3*p + 1)*(T*p + 1)))  # error: This value has units: Magnetic Flux Density^-1, but must have units: Magnetic Flux Density^-2.
# После преобразований:
T := 0.05
# Переходная функция.
W(p) → (10*T*p + 10)/((0.05*p + 1)*(1.6*p + 0.6*p^2 + 1) + 10)
W(p) := -n_5/n_3*(T*p + 1)/((n_1/n_3*p^2 + n_2/n_3*p + 1)*(T*p + 1) + (-n_5/n_3))
# Характеристическое уравнение имеет вид:
Given
(n_1/n_3*p^2 + n_2/n_3*p + 1)*(T*p + 1) + (-n_5/n_3) == 0
# Корни характеристического уравнения,  (полюса передаточной функции)
# λ.1 | λ.2 | λ.3
Find(p) → [-20.8732890195, -0.896688823589 - 4.09417381202i, -0.896688823589 + 4.09417381202i]
# ЗАНЕСТИ В КОРНИ
λ_3 := -0.26 - 5.26i
λ_1 := -21.33
λ_2 := -0.26 + 5.26i
# Разложение в системе нули-полюса
W(p) simplify → (16.6666666667*p + 333.333333333)/((p + 20.8732890195)*(p^2 + 1.79337764718*p + 17.5663100494))
